// COMSOL Multiphysics 5.5.0.292 model "dipolo.mph"
// Circulador Tquad
// Outline of the model tree

Parameters
  a = 0.00112251[m]
  geff = 2.11
  mu0 = 4*pi*1e-7[H/m]
  M0 = 0.5[Wb/m^2]/mu0
  deltaHOe = 200[Oe]
  gamma = 1.855745e11[C/kg]
  freqdeltaH = 9.3e9[Hz]
  H0 = 0.861890e6[A/m]
  r1 = 0.282
  y1 = 7.618705117886264
  r2 = 0.095
  y2 = 9.29
  r3 = 0.22
  YF = -1.770091918204028
  RF = 1.220579750000000
  YC = -1.079644084188952
  XC = 1.179241000000000
  RC = 1.252912250000000
  YCS = -0.640698649330385
  RCS = 0.294824300000000
  YCDS = -1.152308600000000
  XCDS = -1.594485364797471
  RCDS = 0.613191400000000
  YCDDS = 0.426566517844330
  XCDDS = 0.000000000000000
  RCDDS = 1.174172120028461
  YCDDI = 0.000000000000000
  XCDDI = 0.000000000000000
  RCDDI = 0.000000000000000
  YCDDI1 = 4.600424005766312
  XCDDI1 = 0.941745523012787
  RCDDI1 = 3.006073258728061
  YCDDII1 = 2.299406815220073
  XCDDII1 = 1.970010940695119
  RCDDII1 = 0.000000000000000
  YSSF = -0.176812383614950
  RSSF = 0.000000000000000

Variables
  var1 "Variables 1a"
    w = 2*pi*freq
    Xxy = (i*wm*w)/((wi+i*w*alpha)^2-w^2)
    u = 1+Xxx
    k = i*Xxy
    alpha = (deltaHOe*mu0*gamma)/(2*w)
    wm = mu0*gamma*M0
    wi = mu0*gamma*H0
    ku = k/u
    Xxx = (wm*(wi+i*w*alpha))/((wi+i*w*alpha)^2-w^2)

Geometry
  geom1 "Geometry 1" (2D, length unit m)
    c1: Circle | r = 0.2*a
    arr1: Array | input = c1; size = {11, 17}; fullsize = {11, 17}; displ = {a, a}
    c2: Circle | pos = {5*a, y1*a*(1+YF*0.01)}; r = r1*a*(1+RF*0.01)
    c3: Circle | pos = {5*a, y2*a*(1+YCS*0.01)}; r = r2*a*(1+RCS*0.01)
    r1: Rectangle | size = {10*a, 13*a}
    del2: Delete "Delete Entities 2"
      input = arr1(1,15), arr1(1,16), arr1(1,17), arr1(1,9), arr1(10,15), arr1(10,16), arr1(10,17), arr1(10,9), arr1(11,15), arr1(11,16), arr1(11,17), arr1(11,9), arr1(2,15), arr1(2,16), arr1(2,17), arr1(2,9), arr1(3,15), arr1(3,16), arr1(3,17), arr1(3,9), arr1(4,10), arr1(4,15), arr1(4,16), arr1(4,17), arr1(4,8), arr1(4,9), arr1(5,10), arr1(5,15), arr1(5,16), arr1(5,17), arr1(5,6), arr1(5,7), arr1(5,8), arr1(5,9), arr1(6,1), arr1(6,10), arr1(6,11), arr1(6,15), arr1(6,16), arr1(6,17)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
    uni1: Union
      input = arr1(1,1), arr1(1,10), arr1(1,11), arr1(1,12), arr1(1,13), arr1(1,14), arr1(1,2), arr1(1,3), arr1(1,4), arr1(1,5), arr1(1,6), arr1(1,7), arr1(1,8), arr1(10,1), arr1(10,10), arr1(10,11), arr1(10,12), arr1(10,13), arr1(10,14), arr1(10,2), arr1(10,3), arr1(10,4), arr1(10,5), arr1(10,6), arr1(10,7), arr1(10,8), arr1(11,1), arr1(11,10), arr1(11,11), arr1(11,12), arr1(11,13), arr1(11,14), arr1(11,2), arr1(11,3), arr1(11,4), arr1(11,5), arr1(11,6), arr1(11,7), arr1(11,8), arr1(2,1)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
    co1: Compose | input = c2, r1, uni1; formula = r1*(uni1+c2+r1)
    c4: Circle | pos = {5*a*(1+XC*0.01)+(a), 7*a*(1+YC*0.01)}; r = r3*a*(1+RC*0.01)
    c5: Circle | pos = {5*a*(1-XC*0.01)-(a), 7*a*(1+YC*0.01)}; r = r3*a*(1+RC*0.01)
    c6: Circle | pos = {5*a*(1+XCDS*0.01)+(a), 9*a*(1+YCDS*0.01)}; r = 0.2*a*(1+RCDS*0.01)
    c7: Circle | pos = {5*a*(1-XCDS*0.01)-(a), 9*a*(1+YCDS*0.01)}; r = 0.2*a*(1+RCDS*0.01)
    c8: Circle | pos = {5*a*(1+XCDDS*0.01)+(2*a), 9*a*(1+YCDDS*0.01)}; r = 0.2*a*(1+RCDDS*0.01)
    c9: Circle | pos = {5*a*(1-XCDDS*0.01)-(2*a), 9*a*(1+YCDDS*0.01)}; r = 0.2*a*(1+RCDDS*0.01)
    c10: Circle | pos = {5*a*(1+XCDDI*0.01)+(2*a), 7*a*(1+YCDDI*0.01)}; r = 0.2*a*(1+RCDDI*0.01)
    c11: Circle | pos = {5*a*(1-XCDDI*0.01)-(2*a), 7*a*(1+YCDDI*0.01)}; r = 0.2*a*(1+RCDDI*0.01)
    c12: Circle | pos = {5*a*(1+XCDDI1*0.01)+(a), 6*a*(1+YCDDI1*0.01)}; r = 0.2 *a*(1+RCDDI1*0.01)
    c13: Circle | pos = {5*a*(1-XCDDI1*0.01)-(a), 6*a*(1+YCDDI1*0.01)}; r = 0.2 *a*(1+RCDDI1*0.01)
    c15: Circle | pos = {5*a*(1+XCDDII1*0.01)+(a), 5*a*(1+YCDDII1*0.01)}; r = 0.2 *a*(1+RCDDII1*0.01)
    c16: Circle | pos = {5*a*(1-XCDDII1*0.01)-(a), 5*a*(1+YCDDII1*0.01)}; r = 0.2 *a*(1+RCDDII1*0.01)
    c14: Circle | pos = {5*a, 10*a*(1+YSSF*0.01)}; r = 0.2*a*(1+RSSF*0.01)
    fin: Finalize "Form Union"

Materials
  mat2: Common "Ferrite" on domains 89
    def "Basic"
      relpermittivity = 12.9
      relpermeability = {u, -i*k, 0, i*k, u, 0, 0, 0, 1}
      electricconductivity = 0
  mat3: Common "Material 3" on no domains
    def "Basic"
      relpermittivity = 8.9
      relpermeability = 1
      electricconductivity = 0
  mat4: Common "Ar" on domains 2, 67, 88, 94, 104, 105, 123
    def "Basic"
      relpermittivity = 1
      relpermeability = 1
      electricconductivity = 0
  mat5: Common "Dieletrico Si" on domains 1, 3-88, 90-137
    def "Basic"
      relpermittivity = 11.56
      relpermeability = 1
      electricconductivity = 0

Physics
  ewfd: ElectromagneticWavesFrequencyDomain on all domains
    dependent variable E = {Ex, Ey, Ez}
    EquationForm.modeFreq = 1[kHz]
    BackgroundField.w0 = 0
    BackgroundField.Ebg = {0, 0, 0}
    MeshControl.SizeControlParameter = UserDefined
    MeshControl.EnableMeshControl = false
    wee1: WaveEquationElectric (default)
      DisplacementFieldModel = RelativePermittivity
      minput_strainreferencetemperature = 0
    pec1: PerfectElectricConductor (default)
    init1: init "Initial Values 1" (default)
    sctr1: Scattering "Scattering Boundary Condition 1" on boundaries 1-16, 18-43, 45-80, 82-90 | IncidentField = EField
    port1: Port on boundaries 44 | Pin = 1; PortType = Rectangular; beta = 2*pi*freq/c_const; E0 = {0, 0, 1}
    port2: Port on boundaries 17 | Pin = 1; PortType = Rectangular; beta = 2*pi*freq/c_const; E0 = {0, 0, 1}
    port3: Port on boundaries 81 | Pin = 1; PortType = Rectangular; beta = 2*pi*freq/c_const; E0 = {0, 0, 1}

Mesh
  mesh1 "Mesh 1" (physics-controlled)

Studies
  std1 "Study 1"
    freq: Frequency "Frequency Domain"
      punit = Hz
      plist = range(9.2e10,5.0e9/30,9.7e10)
      preusesol = yes
      discretization = {ewfd, physics}

Solver configurations
  sol1 "Solver 1" (study std1)
    v1: Variables "Dependent Variables 1"
    s1: Stationary "Stationary Solver 1" | stol = 0.0010
      dDef: Direct | rhob = 400
      p1: Parametric | pname = freq; plistarr = range(9.2e10,5.0e9/30,9.7e10); punit = Hz; pcontinuationmode = no
      fc1: FullyCoupled

Datasets
  dset1: Solution | solution = sol1

Plots
  pg2: PlotGroup1D "1D Plot Group 1" | data = dset1; title = Global: Modificar Titulo
    glob1: Global
      expr = {ewfd.S11dB, ewfd.S21dB, ewfd.S31dB}
      unit = {1, 1, 1}
      descr = {S-11, S-21, S-31}
      xdata = expr
      xdataexpr = ewfd.freq
  pg3: PlotGroup1D "1D Plot Group 2" | data = dset1; title = Global: Modificar Titulo
    glob1: Global
      expr = {ewfd.S12dB, ewfd.S22dB, ewfd.S32dB}
      descr = {S-12, S-22, S-32}
      xdata = expr
      xdataexpr = ewfd.freq
  pg4: PlotGroup1D "1D Plot Group 3" | data = dset1; title = Global: Modificar Titulo
    glob1: Global
      expr = {ewfd.S13dB, ewfd.S23dB, ewfd.S33dB}
      descr = {S-13, S-23, S-33}
      xdata = expr
      xdataexpr = ewfd.freq
  pg1: PlotGroup2D "Electric Field (ewfd)" | data = dset1
    surf1: Surface | expr = ewfd.Ez; descr = Electric field, z component

Exports
  plot1: Plot
    filename = C:\Users\luizh\Desktop\Engenharia Elétrica\Iniciação Científica\Cristais Fotônicos\Artigo Dipolo-Quadripolo\Simulação Quadripolo - Nova\05-Quadripolo-P1.txt
  plot2: Plot
    filename = C:\Users\luizh\Desktop\Engenharia Elétrica\Iniciação Científica\Cristais Fotônicos\Artigo Dipolo-Quadripolo\Simulação Quadripolo - Nova\05-Quadripolo-P2.txt
  plot3: Plot
    filename = C:\Users\luizh\Desktop\Engenharia Elétrica\Iniciação Científica\Cristais Fotônicos\Artigo Dipolo-Quadripolo\Simulação Quadripolo - Nova\05-Quadripolo-P3.txt
  img1: Image
    size = manualweb
    pngfilename = C:\Users\luizh\Desktop\Engenharia Elétrica\Iniciação Científica\Cristais Fotônicos\Artigo Dipolo-Quadripolo\Simulação Quadripolo - Nova\png porta 1.png
  img2: Image
    size = manualweb
    pngfilename = C:\Users\luizh\Desktop\Engenharia Elétrica\Iniciação Científica\Cristais Fotônicos\Artigo Dipolo-Quadripolo\Simulação Quadripolo - Nova\png porta 2.png
  img3: Image
    size = manualweb
    pngfilename = C:\Users\luizh\Desktop\Engenharia Elétrica\Iniciação Científica\Cristais Fotônicos\Artigo Dipolo-Quadripolo\Simulação Quadripolo - Nova\png porta 3.png